# S-N Curve Calculations
σ_uts := 58000 psi = 399.896 MPa
S_e' := σ_uts*0.5 = 199947962 Pa  # Occurs at 10^6 cycles
S_m := 0.9*σ_uts = 359906331 Pa  # Occurs at 10^3 cycles
# Percent Life Used
3.195*10^4*(4.192*10^-2)% = 13.3934  # High Cycle Life
126*5% = 6.3  # Low Cycle Life
