# Deflection Factor of Safety for Rod-End Clevis
L := 1.5 in = 38.1 mm
δ_max := L/180 = 0.211667 mm
δ_sws := 8.538*10^-3 mm
FOS_deflection := δ_max/δ_sws = 24.7911
# Deflection Factor of Safety for Actuation Assembly and Mounting
L := 65 in = 1651 mm
δ_max := L/180 = 9.17222 mm
δ_sws := 7.781*10^-1 mm
FOS_deflection := δ_max/δ_sws = 11.788
# Actuator Rod-End Clevis Mount High Cycle Fatigue
damage_per_cycle := □
