# Linear Actuator (Exlar FT80 High Capacity) Life Calculations
rate_travel := 8.3 m*tan(1 deg)*1/s = 5.70382 in/s
Life_allowable := 10 yr
Daily_operation := 12 hr/(1 day)
Life_million_inches := 1/10^6*rate_travel*3600 s/(1 hr)*Daily_operation*365 day/(1 yr)*Life_allowable = 899.378 in
Life_million_inches = 899.378 in  # Required life in millions of inches (10 years, 12 hr daily operation)
# Linear Actuator Stroke Length Calculations
L_floor_platform := 8.579 m
Max_lift := L_floor_platform*tan(5 deg) = 29.5498 in
Max_lift = 29.5498 in  # Required Stroke Length
# Linear Actuator Thrust Calculations
F_app := 8.90*10^3 lbf  # Force applied to each linear actuator
v := 5.704  # in/s  # Velocity to accelerate to
ta := 0.5  # s  # Acceleration time
μ := 0.15  # Linear actuator friction coefficient
# Force required to accelerate Yellow Submarine to 1 degree per second and overcome friction:
F_thrust := F_app*μ + F_app/386.4*v/ta + F_app = 10497.8 lbf
F_thrust = 10497.8 lbf
# Linear Actuator Torque Calculations
S := 6 mm  # Screw Lead FT80
F := F_thrust = 10497.8 lbf  # Applied Force
η := 0.90  # Screw Lead Efficiency (60mm diameter shaft)
λ := S*F/(2*π*η) = 438.522 lbf*in  # Required Motor Torque
# Linear Actuator Required RPM Calculations
solve block
    # guess values
    ω := 1500 rad/s
    v := 5.704 in/s
    # constraints
    v == ω*S/((2*π) rad)
    # solver
    ω := find(ω) = 1448.82 rpm
end solve block
# Required Motor RPM
ω = 1448.82 rpm
