# Actuator Rod End Clevis Mount: Frequency Analysis
# Pit on Ball:
d_pit := 0.001 in
d_ball := 0.25 in
a_pit := π*(d_pit/2)^2 = 7.85398e-7 in^2
a_ball := 4*π*(d_ball/2)^2 = 0.000126677 m^2
ω_reg := 210 rad/s
ω_sws := 2773.7 rad/s
Probability := a_pit/a_ball = 4e-6
ω_forcing := ω_reg*Probability = 0.00084 rad/s
FoS_frequency := ω_sws/ω_forcing = 3302024
# Actuator Plate Mount: Frequency Analysis
# Pit on Ball:
d_pit := 0.001 in
d_ball := 0.25 in
a_pit := π*(d_pit/2)^2 = 7.85398e-7 in^2
a_ball := 4*π*(d_ball/2)^2 = 0.000126677 m^2
ω_reg := 210 rad/s
ω_sws := 49.031 rad/s
Probability := a_pit/a_ball = 4e-6
ω_forcing := ω_reg*Probability = 0.00084 rad/s
FoS_frequency := ω_sws/ω_forcing = 58370.2
# Actuator Rod End Clevis Mount: Static Analysis
σ_yeild := 248.2 MPa
σ_vm := 61.67 MPa
FoS := σ_yeild/σ_vm = 4.02465
# Actuator Plate Mount: Static Analysis
σ_yeild := 620.422 MPa
σ_vm := 233 MPa
FoS := σ_yeild/σ_vm = 2.66276
# High Cycle Fatigue - Regular Show Operation
ω := (1/π) rad/(1 s) = 0.31831 rad/s  # Forcing Frequency (rad/s)
f_c := ω/(2*π) = 0.0506606 Hz  # Forcing Frequency (Hz)
# Nyquist Sampling Theorem
f_s ≥ 2*f_c
n := 10  # Samplint 10 times per period to prevent aliasing
f_s := n*f_c = 0.506606 Hz
t := 1/f_s = 1.97392 s  # Sampling time
N_sws := 5000  # Maximum SolidWorks Fatigue Waveform Points
t_sws := N_sws*t = 2.74156 hr  # Time segment modeled per SolidWorks Analysis
# Multiplier for Fatigue Events Over 10 Years
one_year := 8760 hr
# 18 hrs per day runtime:
run_yr := one_year*.75 = 6570 hr
ten_years := 10*run_yr = 65700 hr
multiplier := ten_years/t_sws = 23964.5
# Actuator Plate Mount: HCF Analysis
damage_per_cycle := 0.7265%
total_damage := damage_per_cycle*multiplier = 174.102
