# Floor Platform Gravitational Analysis: Von Mises Stress
σ_y_A500 := 317 MPa  # Square Tubing: ASTM A500 Grade B Yield Strength
σ_y_A992 := 345 MPa  # I-Beams: ASTM A992 Yield Strength
# Note: Using the lowest σ_y to be conservative:
σ_allow := σ_y_A500 = 317 MPa
σ_vm_static := 119.8 MPa  # Maximum Von-Mises Stress from SolidWorks FEA
FoS_static := σ_allow/σ_vm_static = 2.64608
# Floor Platform Gravitational Analysis: Deflection
L_floor := 8.32 m
δ_allowable := L_floor/180 = 46.2222 mm
δ_static := 8.596 mm
FoS_δ := δ_allowable/δ_static = 5.37718
# Floor Platform Failure Mode Analysis: Von Mises Stress
σ_y_A500 := 317 MPa  # Square Tubing: ASTM A500 Grade B Yield Strength
σ_y_A992 := 345 MPa  # I-Beams: ASTM A992 Yield Strength
# Note: Using the lowest σ_y to be conservative:
σ_allow := σ_y_A992 = 345 MPa
σ_vm_static := 130.9 MPa  # Maximum Von-Mises Stress from SolidWorks FEA
FoS_static := σ_allow/σ_vm_static = 2.6356
# Floor Platform Failure Mode Analysis: Deflection
L_floor := 8.32 m
δ_allowable := L_floor/180 = 46.2222 mm
δ_static := 8.835 mm
FoS_δ := δ_allowable/δ_static = 5.23172
