# Total Inches Traveled
ips := 8.3 m*tan(1 deg)*sec^-1 = 5.70382 in/s
travel := ips*(3600 s/hr)*(12 hr/day)*(365 day/yr)*10 yr = 899378405 in
Total := travel/10^6 = 899.378 in
# Torque
S := 1.181 in  # Screw Lead
F := 8000 lbf  # Applied Force
η_1 := 80%  # Efficiency
η_2 := 80%  # Efficiency
τ := S*F/(2*π*η_1) = 1879.62 in*lbf  # Torque for 1:1 ratio
τ_reduction := τ/(2*η_2) = 1174.76 lbf*in  # Torque for 2:1 ratio
